// SBML level 3 version 2

model BIOMD0000000012()
  // model units - time: dimensionless

  // Parameters:
  X = 0 dimensionless;
  Y = 20 dimensionless;
  Z = 0 dimensionless;
  PX = 0 dimensionless;
  PY = 0 dimensionless;
  PZ = 0 dimensionless;
  tau_mRNA = 2 dimensionless;
  tau_prot = 10 dimensionless;
  eff = 20 dimensionless;
  ps_0 = 0.0005 dimensionless;
  ps_a = 0.5 dimensionless;
  KM = 40 dimensionless;
  n = 2 dimensionless;
  cell = 1 dimensionless;
  t_ave = tau_mRNA/ln(2); t_ave has dimensionless;
  beta = tau_mRNA/tau_prot; beta has dimensionless;
  k_tl = eff/t_ave; k_tl has dimensionless;
  a_tr = (ps_a - ps_0)*60; a_tr has dimensionless;
  a0_tr = ps_0*60; a0_tr has dimensionless;
  kd_prot = ln(2)/tau_prot; kd_prot has dimensionless;
  kd_mRNA = ln(2)/tau_mRNA; kd_mRNA has dimensionless;
  alpha = a_tr*eff*tau_prot/(ln(2)*KM); alpha has dimensionless;
  alpha0 = a0_tr*eff*tau_prot/(ln(2)*KM); alpha0 has dimensionless;
  Reaction10 has dimensionless;
  Reaction1 has dimensionless;
  Reaction11 has dimensionless;
  Reaction2 has dimensionless;
  Reaction12 has dimensionless;
  Reaction3 has dimensionless;
  Reaction7 has dimensionless;
  Reaction4 has dimensionless;
  Reaction8 has dimensionless;
  Reaction5 has dimensionless;
  Reaction9 has dimensionless;
  Reaction6 has dimensionless;

  // Assignment rules:
  Reaction1 := kd_mRNA*X;
  Reaction2 := kd_mRNA*Y;
  Reaction3 := kd_mRNA*Z;
  Reaction4 := k_tl*X;
  Reaction5 := k_tl*Y;
  Reaction6 := k_tl*Z;
  Reaction7 := kd_prot*PX;
  Reaction8 := kd_prot*PY;
  Reaction9 := kd_prot*PZ;
  Reaction10 := a0_tr + a_tr*KM^n/(KM^n + PZ^n);
  Reaction11 := a0_tr + a_tr*KM^n/(KM^n + PX^n);
  Reaction12 := a0_tr + a_tr*KM^n/(KM^n + PY^n);

  // Rate rules:
  X' = -Reaction1 + Reaction10;
  Y' = -Reaction2 + Reaction11;
  Z' = -Reaction3 + Reaction12;
  PX' = Reaction4 - Reaction7;
  PY' = Reaction5 - Reaction8;
  PZ' = Reaction6 - Reaction9;

  // Unit definitions:
  unit volume = 1e-15 litre;
  unit substance = item;
  unit time = 60 second;
  unit substance_per_time = item / (60 second);
end
